OpenVSP model (file version 5), 4 components.
Geometry view with OpenVSP parameter names; values to 6 digits, angles in degrees, lengths in the model's unit.
Overall bounding box: X_Min=0 X_Len=2.5 Y_Min=-1.49839 Y_Len=2.99678 Z_Min=-0.25 Z_Len=0.65

Pod "Fuselage"
  location (X Y Z) 0 0 0, rotation 0 0 0
  bounding box size 2.5 0.5 0.5
  Design: FineRatio=10 Length=2.5

Wing "Main_Wing", child of "Fuselage"
  location (X Y Z) 0.8 0 0, rotation 0 0 0
  symmetric about XZ
  bounding box size 0.400036 2.99678 0.111331
  totals: TotalSpan=3 TotalProjectedSpan=2.99589 TotalChord=0.3 TotalArea=0.9 TotalAR=9.97261 MAC=0.311111
  root: chord 0.4, twist 0, NACA 4-series Camber=0.02 CamberLoc=0.4 ThickChord=0.12
  sections:
    n  Span  Root_Chord  Tip_Chord  Area  Sweep  Sweep_Location  Dihedral  Twist  Twist_Location  tip airfoil
    1  1.5   0.4         0.2        0.45  5      0               3         0      0.25            as above

Wing "H_Tail", child of "Main_Wing"
  location (X Y Z) 2.1 0 0.05, rotation 0 0 0
  symmetric about XZ
  bounding box size 0.2 0.4 0.0240109
  totals: TotalSpan=0.4 TotalProjectedSpan=0.4 TotalChord=0.16 TotalArea=0.064 TotalAR=2.5 MAC=0.163333
  root: chord 0.2, twist 0, NACA 4-series Camber=0 CamberLoc=0.2 ThickChord=0.12
  sections:
    n  Span  Root_Chord  Tip_Chord  Area   Sweep  Sweep_Location  Dihedral  Twist  Twist_Location  tip airfoil
    1  0.2   0.2         0.12       0.032  10     0               0         0      0.25            as above

Wing "V_Tail"
  location (X Y Z) 2.1 0 0.1, rotation 90 0 0
  symmetric about XZ
  bounding box size 0.25 0.0300136 0.3
  totals: TotalSpan=0.6 TotalProjectedSpan=0.6 TotalChord=0.185 TotalArea=0.111 TotalAR=3.24324 MAC=0.192613
  root: chord 0.25, twist 0, NACA 4-series Camber=0 CamberLoc=0.2 ThickChord=0.12
  sections:
    n  Span  Root_Chord  Tip_Chord  Area    Sweep  Sweep_Location  Dihedral  Twist  Twist_Location  tip airfoil
    1  0.3   0.25        0.12       0.0555  15     0               0         0      0.25            as above
